New Line.L001 bus1=lv_board bus2=f1_01 phases=3 linecode=abc_95 length=40.0 units=m
New Line.L002 bus1=f1_01 bus2=f1_02 phases=3 linecode=abc_95 length=40.0 units=m
New Line.L003 bus1=f1_02 bus2=f1_03 phases=3 linecode=abc_95 length=40.0 units=m
New Line.L004 bus1=f1_03 bus2=f1_04 phases=3 linecode=abc_95 length=40.0 units=m
New Line.L005 bus1=f1_04 bus2=f1_05 phases=3 linecode=abc_95 length=40.0 units=m
New Line.L006 bus1=f1_05 bus2=f1_06 phases=3 linecode=abc_95 length=40.0 units=m
New Line.L007 bus1=f1_06 bus2=f1_07 phases=3 linecode=abc_95 length=40.0 units=m
New Line.L008 bus1=f1_07 bus2=f1_08 phases=3 linecode=abc_95 length=40.0 units=m
New Line.L009 bus1=f1_08 bus2=f1_09 phases=3 linecode=abc_95 length=40.0 units=m
New Line.L010 bus1=f1_09 bus2=f1_10 phases=3 linecode=abc_95 length=40.0 units=m
New Line.L011 bus1=f1_10 bus2=f1_11 phases=3 linecode=abc_95 length=40.0 units=m
New Line.L012 bus1=f1_11 bus2=f1_12 phases=3 linecode=abc_95 length=40.0 units=m
New Line.L013 bus1=f1_12 bus2=f1_13 phases=3 linecode=abc_95 length=40.0 units=m
New Line.L014 bus1=f1_13 bus2=f1_14 phases=3 linecode=abc_95 length=40.0 units=m
New Line.L015 bus1=f1_02.2 bus2=h001.2 phases=1 linecode=svc_16 length=17.8 units=m
New Line.L016 bus1=f1_02.3 bus2=h002.3 phases=1 linecode=svc_16 length=23.4 units=m
New Line.L017 bus1=f1_03.1 bus2=h003.1 phases=1 linecode=svc_16 length=26.2 units=m
New Line.L018 bus1=f1_03.2 bus2=h004.2 phases=1 linecode=svc_16 length=26.8 units=m
New Line.L019 bus1=f1_04.3 bus2=h005.3 phases=1 linecode=svc_16 length=23.5 units=m
New Line.L020 bus1=f1_04.3 bus2=h006.3 phases=1 linecode=svc_16 length=16.9 units=m
New Line.L021 bus1=f1_05.2 bus2=h007.2 phases=1 linecode=svc_16 length=29.6 units=m
New Line.L022 bus1=f1_05.1 bus2=h008.1 phases=1 linecode=svc_16 length=27.6 units=m
New Line.L023 bus1=f1_06.2 bus2=h009.2 phases=1 linecode=svc_16 length=15.9 units=m
New Line.L024 bus1=f1_06.3 bus2=h010.3 phases=1 linecode=svc_16 length=32.3 units=m
New Line.L025 bus1=f1_07.2 bus2=h011.2 phases=1 linecode=svc_16 length=22.4 units=m
New Line.L026 bus1=f1_07.2 bus2=h012.2 phases=1 linecode=svc_16 length=16.4 units=m
New Line.L027 bus1=f1_08.2 bus2=h013.2 phases=1 linecode=svc_16 length=22.6 units=m
New Line.L028 bus1=f1_08.2 bus2=h014.2 phases=1 linecode=svc_16 length=21.5 units=m
New Line.L029 bus1=f1_09.1 bus2=h015.1 phases=1 linecode=svc_16 length=21.3 units=m
New Line.L030 bus1=f1_09.3 bus2=h016.3 phases=1 linecode=svc_16 length=29.4 units=m
New Line.L031 bus1=f1_10.1 bus2=h017.1 phases=1 linecode=svc_16 length=24.2 units=m
New Line.L032 bus1=f1_10.2 bus2=h018.2 phases=1 linecode=svc_16 length=29.9 units=m
New Line.L033 bus1=f1_11.1 bus2=h019.1 phases=1 linecode=svc_16 length=35.0 units=m
New Line.L034 bus1=f1_11.3 bus2=h020.3 phases=1 linecode=svc_16 length=18.1 units=m
New Line.L035 bus1=f1_12.2 bus2=h021.2 phases=1 linecode=svc_16 length=22.6 units=m
New Line.L036 bus1=f1_12.1 bus2=h022.1 phases=1 linecode=svc_16 length=33.8 units=m
New Line.L037 bus1=f1_13.2 bus2=h023.2 phases=1 linecode=svc_16 length=20.3 units=m
New Line.L038 bus1=f1_13.1 bus2=h024.1 phases=1 linecode=svc_16 length=15.1 units=m
New Line.L039 bus1=f1_14.1 bus2=h025.1 phases=1 linecode=svc_16 length=18.6 units=m
New Line.L040 bus1=f1_14.1 bus2=h026.1 phases=1 linecode=svc_16 length=27.2 units=m
New Line.L041 bus1=f1_06 bus2=f1a_01 phases=3 linecode=abc_50 length=40.0 units=m
New Line.L042 bus1=f1a_01 bus2=f1a_02 phases=3 linecode=abc_50 length=40.0 units=m
New Line.L043 bus1=f1a_02 bus2=f1a_03 phases=3 linecode=abc_50 length=40.0 units=m
New Line.L044 bus1=f1a_03 bus2=f1a_04 phases=3 linecode=abc_50 length=40.0 units=m
New Line.L045 bus1=f1a_04 bus2=f1a_05 phases=3 linecode=abc_50 length=40.0 units=m
New Line.L046 bus1=f1a_05 bus2=f1a_06 phases=3 linecode=abc_50 length=40.0 units=m
New Line.L047 bus1=f1a_01.2 bus2=h027.2 phases=1 linecode=svc_16 length=25.6 units=m
New Line.L048 bus1=f1a_02.2 bus2=h028.2 phases=1 linecode=svc_16 length=22.3 units=m
New Line.L049 bus1=f1a_03.1 bus2=h029.1 phases=1 linecode=svc_16 length=26.3 units=m
New Line.L050 bus1=f1a_04.2 bus2=h030.2 phases=1 linecode=svc_16 length=30.2 units=m
New Line.L051 bus1=f1a_05.2 bus2=h031.2 phases=1 linecode=svc_16 length=18.3 units=m
New Line.L052 bus1=f1a_06.2 bus2=h032.2 phases=1 linecode=svc_16 length=25.8 units=m
New Line.L053 bus1=f1_11 bus2=f1b_01 phases=3 linecode=abc_50 length=40.0 units=m
New Line.L054 bus1=f1b_01 bus2=f1b_02 phases=3 linecode=abc_50 length=40.0 units=m
New Line.L055 bus1=f1b_02 bus2=f1b_03 phases=3 linecode=abc_50 length=40.0 units=m
New Line.L056 bus1=f1b_03 bus2=f1b_04 phases=3 linecode=abc_50 length=40.0 units=m
New Line.L057 bus1=f1b_04 bus2=f1b_05 phases=3 linecode=abc_50 length=40.0 units=m
New Line.L058 bus1=f1b_01.2 bus2=h033.2 phases=1 linecode=svc_16 length=28.4 units=m
New Line.L059 bus1=f1b_02.2 bus2=h034.2 phases=1 linecode=svc_16 length=16.3 units=m
New Line.L060 bus1=f1b_03.1 bus2=h035.1 phases=1 linecode=svc_16 length=16.4 units=m
New Line.L061 bus1=f1b_04.1 bus2=h036.1 phases=1 linecode=svc_16 length=21.6 units=m
New Line.L062 bus1=f1b_05.2 bus2=h037.2 phases=1 linecode=svc_16 length=17.6 units=m
New Line.L063 bus1=lv_board bus2=f2_01 phases=3 linecode=abc_95 length=40.0 units=m
New Line.L064 bus1=f2_01 bus2=f2_02 phases=3 linecode=abc_95 length=40.0 units=m
New Line.L065 bus1=f2_02 bus2=f2_03 phases=3 linecode=abc_95 length=40.0 units=m
New Line.L066 bus1=f2_03 bus2=f2_04 phases=3 linecode=abc_95 length=40.0 units=m
New Line.L067 bus1=f2_04 bus2=f2_05 phases=3 linecode=abc_95 length=40.0 units=m
New Line.L068 bus1=f2_05 bus2=f2_06 phases=3 linecode=abc_95 length=40.0 units=m
New Line.L069 bus1=f2_06 bus2=f2_07 phases=3 linecode=abc_95 length=40.0 units=m
New Line.L070 bus1=f2_07 bus2=f2_08 phases=3 linecode=abc_95 length=40.0 units=m
New Line.L071 bus1=f2_08 bus2=f2_09 phases=3 linecode=abc_95 length=40.0 units=m
New Line.L072 bus1=f2_09 bus2=f2_10 phases=3 linecode=abc_95 length=40.0 units=m
New Line.L073 bus1=f2_10 bus2=f2_11 phases=3 linecode=abc_95 length=40.0 units=m
New Line.L074 bus1=f2_11 bus2=f2_12 phases=3 linecode=abc_95 length=40.0 units=m
New Line.L075 bus1=f2_12 bus2=f2_13 phases=3 linecode=abc_95 length=40.0 units=m
New Line.L076 bus1=f2_13 bus2=f2_14 phases=3 linecode=abc_95 length=40.0 units=m
New Line.L077 bus1=f2_14 bus2=f2_15 phases=3 linecode=abc_95 length=40.0 units=m
New Line.L078 bus1=f2_15 bus2=f2_16 phases=3 linecode=abc_95 length=40.0 units=m
New Line.L079 bus1=f2_16 bus2=f2_17 phases=3 linecode=abc_95 length=40.0 units=m
New Line.L080 bus1=f2_17 bus2=f2_18 phases=3 linecode=abc_95 length=40.0 units=m
New Line.L081 bus1=f2_18 bus2=f2_19 phases=3 linecode=abc_95 length=40.0 units=m
New Line.L082 bus1=f2_19 bus2=f2_20 phases=3 linecode=abc_95 length=40.0 units=m
New Line.L083 bus1=f2_10 bus2=borehole_pump phases=3 linecode=abc_50 length=20.0 units=m
New Line.L084 bus1=f2_17.2 bus2=h038.2 phases=1 linecode=svc_16 length=24.5 units=m
New Line.L085 bus1=f2_17.1 bus2=h039.1 phases=1 linecode=svc_16 length=23.5 units=m
New Line.L086 bus1=f2_18.1 bus2=h040.1 phases=1 linecode=svc_16 length=27.9 units=m
New Line.L087 bus1=f2_18.1 bus2=h041.1 phases=1 linecode=svc_16 length=20.0 units=m
New Line.L088 bus1=f2_19.1 bus2=h042.1 phases=1 linecode=svc_16 length=24.3 units=m
New Line.L089 bus1=f2_19.2 bus2=h043.2 phases=1 linecode=svc_16 length=26.0 units=m
New Line.L090 bus1=f2_20.3 bus2=h044.3 phases=1 linecode=svc_16 length=33.5 units=m
New Line.L091 bus1=f2_20.2 bus2=h045.2 phases=1 linecode=svc_16 length=32.3 units=m
New Line.L092 bus1=f2_20 bus2=irrigation_pump phases=3 linecode=abc_50 length=20.0 units=m
New Line.L093 bus1=lv_board bus2=f3_01 phases=3 linecode=abc_50 length=40.0 units=m
New Line.L094 bus1=f3_01 bus2=f3_02 phases=3 linecode=abc_50 length=40.0 units=m
New Line.L095 bus1=f3_02 bus2=f3_03 phases=3 linecode=abc_50 length=40.0 units=m
New Line.L096 bus1=f3_03 bus2=f3_04 phases=3 linecode=abc_50 length=40.0 units=m
New Line.L097 bus1=f3_04 bus2=f3_05 phases=3 linecode=abc_50 length=40.0 units=m
New Line.L098 bus1=f3_05 bus2=f3_06 phases=3 linecode=abc_50 length=40.0 units=m
New Line.L099 bus1=f3_06 bus2=f3_07 phases=3 linecode=abc_50 length=40.0 units=m
New Line.L100 bus1=f3_07 bus2=f3_08 phases=3 linecode=abc_50 length=40.0 units=m
New Line.L101 bus1=f3_03.3 bus2=shop1.3 phases=1 linecode=svc_16 length=15.0 units=m
New Line.L102 bus1=f3_04.1 bus2=shop2.1 phases=1 linecode=svc_16 length=30.7 units=m
New Line.L103 bus1=f3_05.1 bus2=shop3.1 phases=1 linecode=svc_16 length=29.6 units=m
New Line.L104 bus1=f3_04.3 bus2=clinic.3 phases=1 linecode=svc_16 length=24.7 units=m
New Line.L105 bus1=f3_04 bus2=grinding_mill phases=3 linecode=abc_50 length=20.0 units=m
New Line.L106 bus1=f3_06.3 bus2=h046.3 phases=1 linecode=svc_16 length=25.8 units=m
New Line.L107 bus1=f3_06.1 bus2=h047.1 phases=1 linecode=svc_16 length=33.4 units=m
New Line.L108 bus1=f3_07.3 bus2=h048.3 phases=1 linecode=svc_16 length=18.7 units=m
New Line.L109 bus1=f3_07.3 bus2=h049.3 phases=1 linecode=svc_16 length=33.8 units=m
New Line.L110 bus1=f3_08.2 bus2=h050.2 phases=1 linecode=svc_16 length=23.4 units=m
New Line.L111 bus1=f3_08.1 bus2=h051.1 phases=1 linecode=svc_16 length=28.4 units=m
