New Load.h001 bus1=h001.2 phases=1 kv=0.23 kw=1.24 pf=0.95 model=1 daily=house_a
New Load.h002 bus1=h002.3 phases=1 kv=0.23 kw=0.7 pf=0.95 model=1 daily=house_c
New Load.h003 bus1=h003.1 phases=1 kv=0.23 kw=0.63 pf=0.95 model=1 daily=house_a
New Load.h004 bus1=h004.2 phases=1 kv=0.23 kw=1.32 pf=0.95 model=1 daily=house_c
New Load.h005 bus1=h005.3 phases=1 kv=0.23 kw=1.41 pf=0.95 model=1 daily=house_a
New Load.h006 bus1=h006.3 phases=1 kv=0.23 kw=0.88 pf=0.95 model=1 daily=house_a
New Load.h007 bus1=h007.2 phases=1 kv=0.23 kw=0.7 pf=0.95 model=1 daily=house_b
New Load.h008 bus1=h008.1 phases=1 kv=0.23 kw=1.14 pf=0.95 model=1 daily=house_b
New Load.h009 bus1=h009.2 phases=1 kv=0.23 kw=1.49 pf=0.95 model=1 daily=house_b
New Load.h010 bus1=h010.3 phases=1 kv=0.23 kw=0.83 pf=0.95 model=1 daily=house_b
New Load.h011 bus1=h011.2 phases=1 kv=0.23 kw=0.98 pf=0.95 model=1 daily=house_b
New Load.h012 bus1=h012.2 phases=1 kv=0.23 kw=0.81 pf=0.95 model=1 daily=house_b
New Load.h013 bus1=h013.2 phases=1 kv=0.23 kw=1.23 pf=0.95 model=1 daily=house_c
New Load.h014 bus1=h014.2 phases=1 kv=0.23 kw=1.59 pf=0.95 model=1 daily=house_c
New Load.h015 bus1=h015.1 phases=1 kv=0.23 kw=1.37 pf=0.95 model=1 daily=house_a
New Load.h016 bus1=h016.3 phases=1 kv=0.23 kw=0.87 pf=0.95 model=1 daily=house_a
New Load.h017 bus1=h017.1 phases=1 kv=0.23 kw=0.81 pf=0.95 model=1 daily=house_b
New Load.h018 bus1=h018.2 phases=1 kv=0.23 kw=0.86 pf=0.95 model=1 daily=house_a
New Load.h019 bus1=h019.1 phases=1 kv=0.23 kw=1.03 pf=0.95 model=1 daily=house_c
New Load.h020 bus1=h020.3 phases=1 kv=0.23 kw=1.11 pf=0.95 model=1 daily=house_a
New Load.h021 bus1=h021.2 phases=1 kv=0.23 kw=0.76 pf=0.95 model=1 daily=house_c
New Load.h022 bus1=h022.1 phases=1 kv=0.23 kw=1.6 pf=0.95 model=1 daily=house_c
New Load.h023 bus1=h023.2 phases=1 kv=0.23 kw=1.28 pf=0.95 model=1 daily=house_a
New Load.h024 bus1=h024.1 phases=1 kv=0.23 kw=1.24 pf=0.95 model=1 daily=house_a
New Load.h025 bus1=h025.1 phases=1 kv=0.23 kw=1.32 pf=0.95 model=1 daily=house_c
New Load.h026 bus1=h026.1 phases=1 kv=0.23 kw=1.51 pf=0.95 model=1 daily=house_c
New Load.h027 bus1=h027.2 phases=1 kv=0.23 kw=0.75 pf=0.95 model=1 daily=house_a
New Load.h028 bus1=h028.2 phases=1 kv=0.23 kw=0.6 pf=0.95 model=1 daily=house_b
New Load.h029 bus1=h029.1 phases=1 kv=0.23 kw=1.59 pf=0.95 model=1 daily=house_b
New Load.h030 bus1=h030.2 phases=1 kv=0.23 kw=0.68 pf=0.95 model=1 daily=house_c
New Load.h031 bus1=h031.2 phases=1 kv=0.23 kw=1.37 pf=0.95 model=1 daily=house_a
New Load.h032 bus1=h032.2 phases=1 kv=0.23 kw=1.13 pf=0.95 model=1 daily=house_c
New Load.h033 bus1=h033.2 phases=1 kv=0.23 kw=1.33 pf=0.95 model=1 daily=house_a
New Load.h034 bus1=h034.2 phases=1 kv=0.23 kw=0.97 pf=0.95 model=1 daily=house_c
New Load.h035 bus1=h035.1 phases=1 kv=0.23 kw=0.62 pf=0.95 model=1 daily=house_c
New Load.h036 bus1=h036.1 phases=1 kv=0.23 kw=1.23 pf=0.95 model=1 daily=house_a
New Load.h037 bus1=h037.2 phases=1 kv=0.23 kw=1.11 pf=0.95 model=1 daily=house_b
New Load.borehole_pump bus1=borehole_pump phases=3 kv=0.4 kw=7.5 pf=0.85 model=1 daily=borehole
New Load.h038 bus1=h038.2 phases=1 kv=0.23 kw=1.54 pf=0.95 model=1 daily=house_c
New Load.h039 bus1=h039.1 phases=1 kv=0.23 kw=1.01 pf=0.95 model=1 daily=house_a
New Load.h040 bus1=h040.1 phases=1 kv=0.23 kw=1.07 pf=0.95 model=1 daily=house_c
New Load.h041 bus1=h041.1 phases=1 kv=0.23 kw=0.66 pf=0.95 model=1 daily=house_c
New Load.h042 bus1=h042.1 phases=1 kv=0.23 kw=0.79 pf=0.95 model=1 daily=house_b
New Load.h043 bus1=h043.2 phases=1 kv=0.23 kw=1.47 pf=0.95 model=1 daily=house_a
New Load.h044 bus1=h044.3 phases=1 kv=0.23 kw=0.65 pf=0.95 model=1 daily=house_c
New Load.h045 bus1=h045.2 phases=1 kv=0.23 kw=1.45 pf=0.95 model=1 daily=house_a
New Load.irrigation_pump bus1=irrigation_pump phases=3 kv=0.4 kw=22.0 pf=0.85 model=1 daily=irrigation
New Load.shop1 bus1=shop1.3 phases=1 kv=0.23 kw=2.0 pf=0.95 model=1 daily=shop
New Load.shop2 bus1=shop2.1 phases=1 kv=0.23 kw=2.0 pf=0.95 model=1 daily=shop
New Load.shop3 bus1=shop3.1 phases=1 kv=0.23 kw=2.0 pf=0.95 model=1 daily=shop
New Load.clinic bus1=clinic.3 phases=1 kv=0.23 kw=2.5 pf=0.95 model=1 daily=clinic
New Load.grinding_mill bus1=grinding_mill phases=3 kv=0.4 kw=15.0 pf=0.8 model=1 daily=mill
New Load.h046 bus1=h046.3 phases=1 kv=0.23 kw=0.79 pf=0.95 model=1 daily=house_a
New Load.h047 bus1=h047.1 phases=1 kv=0.23 kw=1.35 pf=0.95 model=1 daily=house_a
New Load.h048 bus1=h048.3 phases=1 kv=0.23 kw=1.13 pf=0.95 model=1 daily=house_a
New Load.h049 bus1=h049.3 phases=1 kv=0.23 kw=1.2 pf=0.95 model=1 daily=house_c
New Load.h050 bus1=h050.2 phases=1 kv=0.23 kw=1.17 pf=0.95 model=1 daily=house_c
New Load.h051 bus1=h051.1 phases=1 kv=0.23 kw=1.18 pf=0.95 model=1 daily=house_c
